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/batch
! ANSYS input file written by Workbench version 2024 R2
! File used for geometry attach: C:\Users\Gabriel Yu\AppData\Local\Temp\WB_Gabriel Yu_10864_2\wbnew_files\dp0\SYS\DM\SYS.dsco
/title,wbnew--Static Structural (A5)
/COM,/COM,     ANSYSMotion, 2024.2
/com,--- Data in consistent NMM units. See Solving Units in the help system for more information.
/units,MPA
/prep7
! Turn off shape checking because checks already performed inside WB mesher.
! See help system for more information.
SHPP,OFF,,NOWARN
etcon,set             ! allow ANSYS to choose best KEYOP's for 180x elements, resets any applicable keyopt to MAPDL defaults
/com,*********** Nodes for the whole assembly ***********
nblock,3,,14720
(1i9,3e20.9e3)
        1    -3.962499986E+01     1.335000000E+01     2.317743097E+01
        2    -3.962499986E+01     1.335000000E+01     1.947743447E+01
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-1
/com,*********** Elements for Body 1 'SYS\ DE       27' ***********
et,1,187
eblock,19,solid,,7242
(19i9)
        1        1        1        1        0        0        0        0       10        0        1      746     2091     1186     2084     7907    10412     7904     7906
    13349    10411
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-1
/com,*********** Send User Defined Coordinate System(s) ***********
csys,0
toffst,273.15,      ! Temperature offset from absolute zero
/com,*********** Set Reference Temperature ***********
tref,22.
/com,*********** Send Materials ***********
MP,DENS,1,1.24e-09,	! tonne mm^-3
MP,EX,1,3500,	! tonne s^-2 mm^-1
MP,NUXY,1,0.34,

!************************* Model Summary ********************
!SYS\ DE       27,	pla,	matid,	1
!************************* End Model Summary ********************
/com,*********** Fixed Supports ***********
CMBLOCK,_FIXEDSU,NODE,      283
(8i10)
       150       151       152       153       154       155       156       157
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cmsel,s,_FIXEDSU
d,all,all
nsel,all
/com,*********** Define Force Using Surface Effect Elements ***********
local,12,0,0.,0.,0.,0.,0.,0.
csys,0
et,2,154
mat,2
eblock,10,,,13
(15i9)
    10843        2        2        2       12      514     1084      515      515     6316     6324      515     6311
    10844        2        2        2       12      336     1083      516      516     4880     6330      516     4879
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-1
esel,s,type,,2
keyop,2,2,1         ! Apply load in local coordinate system
keyop,2,7,1         ! Use original area so load is constant in large deformation
esel,all
/com,*********** Define Force Using Surface Effect Elements ***********
local,13,0,0.,0.,0.,0.,0.,0.
csys,0
et,3,154
mat,3
eblock,10,,,15
(15i9)
    10856        3        3        3       13      330      507      510      510     4829     6250      510     4830
    10857        3        3        3       13      508     1142      509      509     6263     6272      509     6260
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-1
esel,s,type,,3
keyop,3,2,1         ! Apply load in local coordinate system
keyop,3,7,1         ! Use original area so load is constant in large deformation
esel,all
/com,*********** Define Force Using Surface Effect Elements ***********
local,14,0,0.,0.,0.,0.,0.,0.
csys,0
et,4,154
mat,4
eblock,10,,,11
(15i9)
    10871        4        4        4       14      302     1089      498      498     4660     6184      498     4659
    10872        4        4        4       14      496     1091      497      497     6171     6178      497     6166
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-1
esel,s,type,,4
keyop,4,2,1         ! Apply load in local coordinate system
keyop,4,7,1         ! Use original area so load is constant in large deformation
esel,all
/com,*********** Define Force Using Surface Effect Elements ***********
local,15,0,0.,0.,0.,0.,0.,0.
csys,0
et,5,154
mat,5
eblock,10,,,17
(15i9)
    10882        5        5        5       15     2159     1144      491      491    10278     6129      491     6132
    10883        5        5        5       15      293     2136      296      296     4583     4615      296     4572
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-1
esel,s,type,,5
keyop,5,2,1         ! Apply load in local coordinate system
keyop,5,7,1         ! Use original area so load is constant in large deformation
esel,all
/com,*********** Define Force Using Surface Effect Elements ***********
local,16,0,0.,0.,0.,0.,0.,0.
csys,0
et,6,154
mat,6
eblock,10,,,9
(15i9)
    10899        6        6        6       16      477      776      779      779     6010     8068      779     6011
    10900        6        6        6       16      478     1087      777      777     6026     8076      777     6023
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-1
esel,s,type,,6
keyop,6,2,1         ! Apply load in local coordinate system
keyop,6,7,1         ! Use original area so load is constant in large deformation
esel,all
/com,*********** Define Force Using Surface Effect Elements ***********
local,17,0,0.,0.,0.,0.,0.,0.
csys,0
et,7,154
mat,7
eblock,10,,,13
(15i9)
    10908        7        7        7       17      772     1140     1139     1139     8039    10241     1139     8038
    10909        7        7        7       17      472     1140      771      771     5970     8033      771     5969
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-1
esel,s,type,,7
keyop,7,2,1         ! Apply load in local coordinate system
keyop,7,7,1         ! Use original area so load is constant in large deformation
esel,all
fini
/com,****************************************************************************
/com,*************************    SOLUTION       ********************************
/com,****************************************************************************
/solu
antype,0                   ! static analysis
_thickRatio=  1     ! Ratio of thick parts in the model
eqsl,pcg,1e-8,,,,,,1
cntr,print,1               ! print out contact info and also make no initial contact an error
cncheck,dmp		!	Enable program controlled contact splitting for distributed memory parallel run
dmpoption,emat,no             ! Don't combine emat file for DANSYS
dmpoption,esav,no             ! Don't combine esav file for DANSYS
nldiag,cont,iter           ! print out contact info each equilibrium iteration
rescontrol,,none                 ! Do not keep any restart files
/com,****************************************************
/com,******************* SOLVE FOR LS 1 OF 1 ****************
esel,s,type,,2
nsle
sfe,all,1,pres,1,9.59442720464061e-004
sfe,all,2,pres,1,8.21998314743287e-002
sfe,all,3,pres,1,-5.53934497846074e-004
esel,s,type,,3
nsle
sfe,all,1,pres,1,-1.01322096457859e-003
sfe,all,2,pres,1,8.12102949375024e-002
sfe,all,3,pres,1,5.84983379111593e-004
esel,s,type,,4
nsle
sfe,all,1,pres,1,-9.59489381253273e-004
sfe,all,2,pres,1,8.22038291168433e-002
sfe,all,3,pres,1,-5.53961437464553e-004
esel,s,type,,5
nsle
sfe,all,1,pres,1,1.01134601988261e-003
sfe,all,2,pres,1,8.10600169457568e-002
sfe,all,3,pres,1,5.83900879319109e-004
esel,s,type,,6
nsle
sfe,all,1,pres,1,0.
sfe,all,2,pres,1,8.22084346939641e-002
sfe,all,3,pres,1,1.10798494775831e-003
esel,s,type,,7
nsle
sfe,all,1,pres,1,0.
sfe,all,2,pres,1,8.12112327970927e-002
sfe,all,3,pres,1,-1.1699802696203e-003
nsel,all
esel,all
nsub,1,1,1
time,1.
outres,erase
outres,all,none
outres,nsol,all,
outres,rsol,all
outres,eangl,all
outres,etmp,all
outres,veng,all
outres,strs,all,
outres,epel,all,
outres,eppl,all,
outres,cont,all,
! *********** WB SOLVE COMMAND ***********
! check interactive state
*get,ANSINTER_,active,,int
*if,ANSINTER_,ne,0,then
/eof
*endif
solve
/com *************** Write FE CONNECTORS *********
CEWRITE,file,ce,,INTE
/com,****************************************************
/com,*************** FINISHED SOLVE FOR LS 1 *************
*get,_NSOLTHREADS,active,0,ntfs
*get,_NSOLPROCESSES,active,0,npfs
*get,_PCGITER,active,,solu,cgiter
/post1
fini
